<?xml version="1.0"?>
<?xml-stylesheet type="text/xsl" href="http://jsbsim.sourceforge.net/JSBSim.xsl"?>
<fdm_config name="C684" version="2.0" release="BETA"
   xmlns:xsi="http://www.w3.org/2001/XMLSchema-instance"
   xsi:noNamespaceSchemaLocation="http://jsbsim.sourceforge.net/JSBSim.xsd">

  <fileheader>
    <author> Guillaume Chauvat </author>
    <filecreationdate> 2008-08-27 </filecreationdate>
    <version> 0.2.0 </version>
    <description>Grumman G-164A Ag-Cat</description>
  </fileheader>

  <metrics>
    <wingarea  unit="M2">   30.47 </wingarea>
    <wingspan  unit="M" >  10.95 </wingspan>
    <wing_incidence>        6.00 </wing_incidence>
    <chord     unit="M" >   2.90 </chord>
    <htailarea unit="M2">   4.50 </htailarea>
    <htailarm  unit="M" >   4.50 </htailarm>
    <vtailarea unit="M2">   2.80 </vtailarea>
    <vtailarm  unit="M" >   4.50 </vtailarm>
    <location name="AERORP" unit="M">
      <x>   2.12 </x>
      <y>   0.00 </y>
      <z>   0.30 </z>
    </location>
    <location name="EYEPOINT" unit="M">
      <x> 0.00 </x>
      <y> 0.00 </y>
      <z> 0.00 </z>
    </location>
    <location name="VRP" unit="M">
      <x> 3.00 </x>
      <y> 0.00 </y>
      <z> 0.00 </z>
    </location>
  </metrics>

  <mass_balance>
    <ixx unit="KG*M2">   5000 </ixx>
    <iyy unit="KG*M2">   9000 </iyy>
    <izz unit="KG*M2">  12000 </izz>
    <ixy unit="KG*M2">      0 </ixy>
    <ixz unit="KG*M2">      0 </ixz>
    <iyz unit="KG*M2">      0 </iyz>
    <emptywt unit="KG" > 1300 </emptywt>
    <location name="CG" unit="M">
      <x>   2.10 </x>
      <y>   0.00 </y>
      <z>   0.00 </z>
    </location>

    <pointmass name="Pilot" >
      <weight unit="KG">85</weight>
      <location name="POINTMASS" unit = "M">
        <x>  3.57 </x>
        <y>  0.00 </y>
        <z>  0.30 </z>
      </location>
    </pointmass>

    <pointmass name="Hopper" >
      <weight unit="KG">800</weight>
      <location name="POINTMASS" unit = "M">
        <x>  2.18 </x>
        <y>  0.00 </y>
        <z>  0.35 </z>
      </location>
    </pointmass>

  </mass_balance>

  <ground_reactions>

    <contact type="BOGEY" name="LEFT_MAIN">
      <location unit="M">
        <x>  1.59 </x>
        <y> -1.27 </y>
        <z> -1.70 </z>
      </location>
      <static_friction>  1.00 </static_friction>
      <dynamic_friction> 0.40 </dynamic_friction>
      <rolling_friction> 0.02 </rolling_friction>
      <spring_coeff unit="N/M">     150000.00 </spring_coeff>
      <damping_coeff unit="N/M/SEC"> 10000.00 </damping_coeff>
      <max_steer unit="DEG">0</max_steer>
      <brake_group>LEFT</brake_group>
      <retractable>FIXED</retractable>
    </contact>

    <contact type="BOGEY" name="RIGHT_MAIN">
      <location unit="M">
        <x>  1.59 </x>
        <y>  1.27 </y>
        <z> -1.70 </z>
      </location>
      <static_friction>  1.00 </static_friction>
      <dynamic_friction> 0.40 </dynamic_friction>
      <rolling_friction> 0.04 </rolling_friction>
      <spring_coeff unit="N/M">     150000.00 </spring_coeff>
      <damping_coeff unit="N/M/SEC"> 10000.00 </damping_coeff>
      <max_steer unit="DEG">0</max_steer>
      <brake_group>RIGHT</brake_group>
      <retractable>FIXED</retractable>
    </contact>

    <contact type="BOGEY" name="TAIL">
      <location unit="M">
        <x>  7.17 </x>
        <y>  0.00 </y>
        <z> -0.70 </z>
      </location>
      <static_friction>  0.80 </static_friction>
      <dynamic_friction> 0.40 </dynamic_friction>
      <rolling_friction> 0.04 </rolling_friction>
      <spring_coeff unit="N/M">      100000.00 </spring_coeff>
      <damping_coeff unit="N/M/SEC">  10000.00 </damping_coeff>
      <max_steer unit="DEG"> -15.00 </max_steer>
      <brake_group>NONE</brake_group>
      <retractable>FIXED</retractable>
    </contact>

    <contact type="STRUCTURE" name="LEFT_BOTTOM_WINGTIP">
      <location unit="M">
        <x>   2.80 </x>
        <y>  -5.20 </y>
        <z>  -0.20 </z>
      </location>
      <static_friction>  0.80 </static_friction>
      <dynamic_friction> 0.40 </dynamic_friction>
      <rolling_friction> 0.06 </rolling_friction>
      <spring_coeff unit="N/M">      200000 </spring_coeff>
      <damping_coeff unit="N/M/SEC">  10000 </damping_coeff>
      <brake_group> NONE </brake_group>
    </contact>

    <contact type="STRUCTURE" name="RIGHT_BOTTOM_WINGTIP">
      <location unit="M">
        <x>   2.80 </x>
        <y>   5.20 </y>
        <z>  -0.20 </z>
      </location>
      <static_friction>  0.80 </static_friction>
      <dynamic_friction> 0.50 </dynamic_friction>
      <rolling_friction> 0.50 </rolling_friction>
      <spring_coeff unit="N/M">      200000 </spring_coeff>
      <damping_coeff unit="N/M/SEC">  10000 </damping_coeff>
      <brake_group> NONE </brake_group>
    </contact>

    <contact type="STRUCTURE" name="LEFT_TOP_WINGTIP">
      <location unit="M">
        <x>   1.80 </x>
        <y>  -5.40 </y>
        <z>   1.69 </z>
      </location>
      <static_friction>  0.80 </static_friction>
      <dynamic_friction> 0.50 </dynamic_friction>
      <rolling_friction> 0.50 </rolling_friction>
      <spring_coeff unit="N/M">      200000 </spring_coeff>
      <damping_coeff unit="N/M/SEC">  10000 </damping_coeff>
      <brake_group> NONE </brake_group>
    </contact>

    <contact type="STRUCTURE" name="RIGHT_TOP_WINGTIP">
      <location unit="M">
        <x>   1.80 </x>
        <y>   5.40 </y>
        <z>   1.69 </z>
      </location>
      <static_friction>  0.80 </static_friction>
      <dynamic_friction> 0.50 </dynamic_friction>
      <rolling_friction> 0.50 </rolling_friction>
      <spring_coeff unit="N/M">      200000 </spring_coeff>
      <damping_coeff unit="N/M/SEC">  10000 </damping_coeff>
      <brake_group> NONE </brake_group>
    </contact>

    <contact type="STRUCTURE" name="VTAIL">
      <location unit="M">
        <x>   6.30 </x>
        <y>   0.00 </y>
        <z>   1.90 </z>
      </location>
      <static_friction>  0.80 </static_friction>
      <dynamic_friction> 0.50 </dynamic_friction>
      <rolling_friction> 0.50 </rolling_friction>
      <spring_coeff unit="N/M">      200000 </spring_coeff>
      <damping_coeff unit="N/M/SEC">  10000 </damping_coeff>
      <brake_group> NONE </brake_group>
    </contact>

    <contact type="STRUCTURE" name="NOSE">
      <location unit="M">
        <x>   0.00 </x>
        <y>   0.00 </y>
        <z>   0.00 </z>
      </location>
      <static_friction>  0.80 </static_friction>
      <dynamic_friction> 0.50 </dynamic_friction>
      <rolling_friction> 0.50 </rolling_friction>
      <spring_coeff unit="N/M">      200000 </spring_coeff>
      <damping_coeff unit="N/M/SEC">  10000 </damping_coeff>
      <brake_group> NONE </brake_group>
    </contact>

  </ground_reactions>

  <propulsion>

    <engine file="R-1340-AN1">
      <location unit="M">
        <x>   0.62 </x>
        <y>   0.00 </y>
        <z>   0.00 </z>
      </location>
      <orient unit="DEG">
        <pitch> 0.00 </pitch>
        <roll>  0.00 </roll>
        <yaw>   0.00 </yaw>
      </orient>
      <feed>0</feed>
      <thruster file="12D40_AG-100-2">
        <location unit="M">
          <x>   0.25 </x>
          <y>   0.00 </y>
          <z>   0.00 </z>
        </location>
        <orient unit="DEG">
          <pitch> 0.00 </pitch>
          <roll>  0.00 </roll>
          <yaw>   0.00 </yaw>
        </orient>
        <sense>1</sense>
        <p_factor>10</p_factor>
      </thruster>
    </engine>

    <tank type="FUEL" number="0">
      <location unit="M">
        <x>  1.86 </x>
        <y>  0.00 </y>
        <z> -0.40 </z>
      </location>
      <capacity unit="KG"> 260.00 </capacity> <!-- 80 Gal -->
      <contents unit="KG"> 230.00 </contents>
    </tank>

  </propulsion>

  <flight_control name="FCS: G-164A">

    <property>fcs/mixture-mod-cmd-norm</property>
	<!--<property>propulsion/engine[0]/failure</property>-->
	<property>propulsion/engine[0]/mixture-mod</property>

    <channel name="Pitch">
      <summer name="Pitch Trim Sum">
        <input>fcs/elevator-cmd-norm</input>
        <input>fcs/pitch-trim-cmd-norm</input>
        <clipto>
          <min> -1 </min>
          <max>  1 </max>
        </clipto>
        <output>fcs/elevator-pos-norm</output>
      </summer>

      <aerosurface_scale name="Elevator Control">
        <input>fcs/pitch-trim-sum</input>
        <range>
          <min> -0.35 </min>
          <max>  0.30 </max>
        </range>
        <output>fcs/elevator-pos-rad</output>
      </aerosurface_scale>

    </channel>

    <channel name="Roll">
      <summer name="Roll Trim Sum">
        <input>fcs/aileron-cmd-norm</input>
        <input>fcs/roll-trim-cmd-norm</input>
        <clipto>
          <min> -1 </min>
          <max>  1 </max>
        </clipto>
      </summer>

      <aerosurface_scale name="Left Aileron Control">
        <input>fcs/roll-trim-sum</input>
        <range>
          <min> -20 </min>
          <max>  15 </max>
        </range>
        <output>fcs/left-aileron-pos-deg</output>
      </aerosurface_scale>
      <aerosurface_scale name="Left Aileron Control norm">
        <input>fcs/roll-trim-sum</input>
        <range>
          <min> -1 </min>
          <max>  1 </max>
        </range>
        <output>fcs/left-aileron-pos-norm</output>
      </aerosurface_scale>

      <aerosurface_scale name="Right Aileron Control">
        <input>fcs/roll-trim-sum</input>
        <range>
          <min> -20 </min>
          <max>  15 </max>
        </range>
        <output>fcs/right-aileron-pos-deg</output>
      </aerosurface_scale>
      <aerosurface_scale name="Right Aileron Control norm">
        <input>fcs/roll-trim-sum</input>
        <range>
          <min> -1 </min>
          <max>  1 </max>
        </range>
        <output>fcs/right-aileron-pos-norm</output>
      </aerosurface_scale>

    </channel>

    <channel name="Yaw">
      <summer name="Rudder Command Sum">
        <input>fcs/rudder-cmd-norm</input>
        <input>fcs/yaw-trim-cmd-norm</input>
        <limit>
          <min> -20 </min>
          <max>  20 </max>
        </limit>
      </summer>

      <aerosurface_scale name="Rudder Control">
        <input>fcs/rudder-command-sum</input>
        <range>
          <min> -20 </min>
          <max>  20 </max>
        </range>
        <output>fcs/rudder-pos-deg</output>
      </aerosurface_scale>

      <aerosurface_scale name="Rudder Sum">
        <input>fcs/rudder-command-sum</input>
        <range>
          <min> -1 </min>
          <max>  1 </max>
        </range>
        <output>fcs/rudder-pos-norm</output>
      </aerosurface_scale>

    </channel>

    <channel name="Flaps">
    </channel>

    <channel name="Landing Gear">
      <pure_gain name="Left Brake cmd norm">
        <input>fcs/left-brake-cmd-norm</input>
        <gain>0.3</gain>
        <output>fcs/left-brake-cmd-norm</output>
      </pure_gain>
      <pure_gain name="Right Brake cmd norm">
        <input>fcs/right-brake-cmd-norm</input>
        <gain>0.3</gain>
        <output>fcs/right-brake-cmd-norm</output>
      </pure_gain>
    </channel>

    <channel name="Speedbrake">
    </channel>

    <channel name="Engine">
      <switch name="Mixture Pos Norm">
        <default value="fcs/mixture-cmd-norm"/>
        <test value="fcs/mixture-mod-cmd-norm">
          propulsion/engine/mixture-mod == 1
        </test>
		<output>fcs/mixture-pos-norm</output>
      </switch>
<!--
	  <pure_gain name="Throttle Pos Norm">
        <input>fcs/throttle-cmd-norm</input>
        <gain>propulsion/engine/rpm-mod</gain>
        <output>fcs/throttle-pos-norm</output>
      </pure_gain>
      -->
    </channel>

  </flight_control>

  <aerodynamics>

  <function name="aero/function/kCDge">
    <description>Change_in_drag_due_to_ground_effect</description>
    <product>
      <table>
        <independentVar>aero/h_b-mac-ft</independentVar>
          <tableData>
                     0.0000 0.0480
                     0.1000 0.5150
                     0.1500 0.6290
                     0.2000 0.7090
                     0.3000 0.8150
                     0.4000 0.8820
                     0.5000 0.9280
                     0.6000 0.9620
                     0.7000 0.9880
                     0.8000 1.0000
                     0.9000 1.0000
                     1.0000 1.0000
                     1.1000 1.0000
          </tableData>
        </table>
      </product>
    </function>

  <function name="aero/function/kCLge">
    <description>Change_in_lift_due_to_ground_effect</description>
    <product>
      <table>
        <independentVar>aero/h_b-mac-ft</independentVar>
        <tableData>
          0.0000 1.2030
          0.1000 1.1270
          0.1500 1.0900
          0.2000 1.0730
          0.3000 1.0460
          0.4000 1.0550
          0.5000 1.0190
          0.6000 1.0130
          0.7000 1.0080
          0.8000 1.0060
          0.9000 1.0030
          1.0000 1.0020
          1.1000 1.0000
        </tableData>
      </table>
    </product>
  </function>

  <axis name="LIFT">

    <function name="aero/coefficient/CLalpha">
      <description>Lift_due_to_alpha</description>
      <product>
        <property>aero/qbar-psf</property>
        <property>metrics/Sw-sqft</property>
        <property>aero/function/kCLge</property>
        <table>
          <independentVar lookup="row">aero/alpha-deg</independentVar>
          <tableData>
			-16		-0.446
			-14		-0.517
			-12		-0.552
			-10		-0.474
			-8		-0.34
			-6		-0.184
			-4		-0.028
			-2		0.12
			0		0.283
			2		0.425
			4		0.581
			6		0.722
			8		0.871
			10		0.998
			12		1.09
			14		1.14
			16		1.126
			18		1.041
			20		0.935
          </tableData>
        </table>
      </product>
    </function>

    <function name="aero/coefficient/CLde">
        <description>Lift_due_to_Elevator_Deflection</description>
        <product>
            <property>aero/qbar-psf</property>
            <property>metrics/Sw-sqft</property>
            <property>fcs/elevator-pos-rad</property>
            <value>0.2</value>
        </product>
    </function>

</axis>


  <axis name="DRAG">

    <function name="aero/coefficient/CD0">
      <description>Drag_at_zero_lift</description>
      <product>
        <property>aero/qbar-psf</property>
        <property>metrics/Sw-sqft</property>
        <table>
          <independentVar lookup="row">aero/alpha-deg</independentVar>
          <tableData>
        -90  1.500
        -25  0.350
        -20  0.200
        -18  0.130
		-16	 0.090
		-14	 0.065
		-12	 0.055
		-10	 0.047
		-8	 0.041
		-6	 0.038
		-4	 0.036
		-2	 0.035
		0	 0.035
		2	 0.035
		4	 0.036
		6	 0.038
		8	 0.041
		10	 0.047
		12	 0.054
		14	 0.064
		16	 0.085
		18	 0.125
		20	 0.200
        25   0.350
        90   1.500
          </tableData>
        </table>
      </product>
    </function>

    <function name="aero/coefficient/CDi">
      <description>Induced_drag</description>
        <product>
          <property>aero/qbar-psf</property>
          <property>metrics/Sw-sqft</property>
          <property>aero/cl-squared</property>
          <value>0.051</value> <!-- 1/(pi * aspect ratio * e (oswald coefficient)). Data for one wing only, is it right?-->
        </product>
    </function>

    <function name="aero/coefficient/CDmach">
      <description>Drag_due_to_mach</description>
      <product>
        <property>aero/qbar-psf</property>
        <property>metrics/Sw-sqft</property>
        <table>
          <independentVar lookup="row">velocities/mach</independentVar>
          <tableData>
              0.00      0.000
              0.72      0.000
              1.10      0.023
              1.80      0.015
          </tableData>
        </table>
      </product>
    </function>

    <function name="aero/coefficient/CDbeta">
      <description>Drag_due_to_sideslip</description>
      <product>
        <property>aero/qbar-psf</property>
        <property>metrics/Sw-sqft</property>
        <table>
          <independentVar lookup="row">aero/beta-rad</independentVar>
          <tableData>
            -1.57       1.230
            -0.26    0.050
             0.00       0.000
             0.26    0.050
             1.57       1.230
          </tableData>
        </table>
      </product>
    </function>

    <function name="aero/coefficient/CDde">
      <description>Drag_due_to_Elevator_Deflection</description>
      <product>
        <property>aero/qbar-psf</property>
        <property>metrics/Sw-sqft</property>
        <property>fcs/elevator-pos-norm</property>
        <value>0.04</value>
      </product>
    </function>

  </axis>

  <axis name="SIDE">

    <function name="aero/coefficient/CYb">
      <description>Side_force_due_to_beta</description>
      <product>
        <property>aero/qbar-psf</property>
        <property>metrics/Sw-sqft</property>
        <property>aero/beta-rad</property>
        <value>-1</value>
      </product>
    </function>

  </axis>

  <axis name="ROLL">

    <function name="aero/coefficient/Clb">
      <description>Roll_moment_due_to_beta</description>
      <product>
        <property>aero/qbar-psf</property>
        <property>metrics/Sw-sqft</property>
        <property>metrics/bw-ft</property>
        <property>aero/beta-rad</property>
        <table>
          <independentVar lookup="row">aero/alpha-deg</independentVar>
          <tableData>
             -40.0     -0.250
             -22.0     -0.200
             -16.0     -0.100
             -14.0     -0.090
               0.0     -0.080
              14.0     -0.090
              16.0     -0.100
              22.0     -0.130
              40.0     -0.160
          </tableData>
        </table>
      </product>
    </function>

    <function name="aero/coefficient/Clp">
      <description>Roll_moment_due_to_roll_rate</description>
      <product>
        <property>aero/qbar-psf</property>
        <property>metrics/Sw-sqft</property>
        <property>metrics/bw-ft</property>
        <property>aero/bi2vel</property>
        <property>velocities/p-aero-rad_sec</property>
        <table>
          <independentVar lookup="row">aero/alpha-deg</independentVar>
          <tableData>
             -40.0      0.10  <!-- |                  -->
             -22.0      0.05  <!-- | Asymmetric stall -->
             -18.0      0.00  <!-- |                  -->
             -16.0     -0.30
               0.0     -0.45
              16.0     -0.30
              18.0      0.00  <!-- |                  -->
              22.0      0.05  <!-- | Asymmetric stall -->
              40.0      0.10  <!-- |                  -->
          </tableData>
        </table>
      </product>
    </function>

    <function name="aero/coefficient/Clr">
      <description>Roll_moment_due_to_yaw_rate</description>
      <product>
        <property>aero/qbar-psf</property>
        <property>metrics/Sw-sqft</property>
        <property>metrics/bw-ft</property>
        <property>aero/bi2vel</property>
        <property>velocities/r-aero-rad_sec</property>
        <value>0.15</value>
      </product>
    </function>

    <function name="aero/coefficient/Clda">
      <description>Roll_moment_due_to_aileron</description>
      <product>
        <property>aero/qbar-psf</property>
        <property>metrics/Sw-sqft</property>
        <property>metrics/bw-ft</property>
        <property>fcs/left-aileron-pos-rad</property>
        <table>
          <independentVar lookup="row">aero/alpha-deg</independentVar>
          <tableData>
             -40.0      0.00
             -25.0      0.00
             -20.0      0.08
             -16.0      0.13
               0.0      0.15
              16.0      0.13
              20.0      0.08
              25.0      0.00  <!-- aileron has no roll effect when wing is stalled (?) -->
              40.0      0.00
          </tableData>
        </table>
      </product>
    </function>

    <function name="aero/coefficient/Cldr">
      <description>Roll_moment_due_to_rudder</description>
      <product>
        <property>aero/qbar-psf</property>
        <property>metrics/Sw-sqft</property>
        <property>metrics/bw-ft</property>
        <property>fcs/rudder-pos-rad</property>
        <value>0.00</value>  <!-- Replaced by Roll_moment_due_to_beta: Induced roll is due to beta (?) -->
      </product>
    </function>
  </axis>


  <axis name="PITCH">

    <function name="aero/coefficient/Cmalpha">
      <description>Pitch_moment_due_to_alpha</description>
      <product>
        <property>aero/qbar-psf</property>
        <property>metrics/Sw-sqft</property>
        <property>metrics/cbarw-ft</property>
        <property>aero/alpha-rad</property>
        <value>-1.3</value>
      </product>
    </function>

    <function name="aero/coefficient/Cmde">
      <description>Pitch_moment_due_to_elevator</description>
      <product>
        <property>aero/qbar-psf</property>
        <property>metrics/Sw-sqft</property>
        <property>metrics/cbarw-ft</property>
        <property>fcs/elevator-pos-rad</property>
        <value>-1.4</value>
      </product>
    </function>

    <function name="aero/coefficient/Cmq">
      <description>Pitch_moment_due_to_pitch_rate</description>
      <product>
        <property>aero/qbar-psf</property>
        <property>metrics/Sw-sqft</property>
        <property>metrics/cbarw-ft</property>
        <property>aero/ci2vel</property>
        <property>velocities/q-aero-rad_sec</property>
        <value>-15</value>
      </product>
    </function>

    <function name="aero/coefficient/Cmadot">
      <description>Pitch_moment_due_to_alpha_rate</description>
      <product>
        <property>aero/qbar-psf</property>
        <property>metrics/Sw-sqft</property>
        <property>metrics/cbarw-ft</property>
        <property>aero/ci2vel</property>
        <property>aero/alphadot-rad_sec</property>
        <value>-8</value>
      </product>
    </function>

  </axis>

  <axis name="YAW">

    <function name="aero/coefficient/Cnb">
      <description>Yaw_moment_due_to_beta</description>
      <product>
        <property>aero/qbar-psf</property>
        <property>metrics/Sw-sqft</property>
        <property>metrics/bw-ft</property>
        <property>aero/beta-rad</property>
        <value>0.17</value>
      </product>
    </function>

    <function name="aero/coefficient/Cnr">
      <description>Yaw_moment_due_to_yaw_rate</description>
      <product>
        <property>aero/qbar-psf</property>
        <property>metrics/Sw-sqft</property>
        <property>metrics/bw-ft</property>
        <property>aero/bi2vel</property>
        <property>velocities/r-aero-rad_sec</property>
        <value>-0.15</value>
      </product>
    </function>

    <function name="aero/coefficient/Cndr">
      <description>Yaw_moment_due_to_rudder</description>
      <product>
        <property>aero/qbar-psf</property>
        <property>metrics/Sw-sqft</property>
        <property>metrics/bw-ft</property>
        <property>fcs/rudder-pos-rad</property>
        <value>-0.12</value>
      </product>
    </function>

    <function name="aero/coefficient/Cnda">
      <description>Adverse_yaw</description>
      <product>
        <property>aero/qbar-psf</property>
        <property>metrics/Sw-sqft</property>
        <property>metrics/bw-ft</property>
        <property>fcs/left-aileron-pos-rad</property>
        <property>aero/alpha-rad</property>
        <value>-0.017</value>
      </product>
    </function>

  </axis>

  </aerodynamics>

</fdm_config>
